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# Исходные данные:
# - диаметр барабана - D = 0.4 м
# - тяговое усилие на ленте - F = 5.5 кН
# - скорость ленты - V = 0.7 м/с
# - нагрузка - постоянная
# - вид передач - нереверсивный
# - срок службы привода - 10 лет при работе в одну смену
# - срок службы подшипников - 20000 часов
D := 0.4
η_зп := 0.97  # КПД закрытой передачи
F := 5.5
η_оп := 0.95  # КПД открытой передачи
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V := 0.7
η_м := 1  # КПД муфты
η_пп := 0.99  # КПД пары подшипников
n := 3  # число пар подшипников
P_рв := F*V = 3.85  # мощность рабочего вала
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η_Σ := η_зп*η_оп*η_м*η_пп^n = 0.894131  # общий КПД привода
P_эд := P_рв/η_Σ = 4.30586  # требуемая мощность электродвигателя
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ω_рв := 2*V/D = 3.5  # угловая скорость рабочего вала
U_зп := 4
U_оп := 2.5
U_рек := U_зп*U_оп = 10
# Тип двигателя: АИР132М8
# Исполнение: IM 1081
# Мощность: 5,5 кВт
# Число полюсво: 8
# Частота вращения: 712 мин^-1
# Tmax/Tmin: 2,2
# Диаметр вала: 38 мм
n_тр.эд := 30*ω_рв*U_рек/π = 334.225
n_эд := 712  # фактическая частота вращения двигателя
ω_эд := π*n_эд/30 = 74.5605
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U` := ω_эд/ω_рв = 21.303
U`_зп := U`/U_оп = 8.5212
U'_зп := 8
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U'_рем := U`/U'_зп = 2.66287
# Угловые скорости и частоты вращения валов
# Вал 1
ω_1 := ω_эд = 74.5605
n_1 := n_эд = 712
# Вал 2
ω_2 := ω_1/U'_рем = 28
n_2 := 30*ω_2/π = 267.38
# Вал 3
ω_3 := ω_2/U'_зп = 3.5
n_3 := 30*ω_3/π = 33.4225
# Мощность и вращающий момент на валах
# Вал 1
P_1 := P_эд = 4.30586
T_1 := P_1/ω_1 = 0.0577499
# Вал 2
P_2 := P_1*η_оп*η_пп = 4.04966
T_2 := P_2/ω_2 = 0.144631
# Вал 3
P_3 := P_2*η_зп*η_пп = 3.88889
T_3 := P_3/ω_3 = 1.11111
T_рв := F*D/2 = 1.1
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